*Heading
** Job name: RVE_single_fibre Model name: Model-1
** Generated by: Abaqus/CAE 2020
*Preprint, echo=NO, model=NO, history=NO, contact=NO
**
** PARTS
**
*Part, name=Union_part
*Node
      1, 0.00310000009,           0., 0.00800000038
      2, 0.00310000009,           0.,           0.
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*Element, type=C3D6
   1, 2285,  554, 2260,  323,   41,  298
   2, 2260,  552, 2259,  298,   39,  297
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*Element, type=C3D8
4673,   99, 1164, 1163,  100, 1785, 4177, 4176, 1784
4674,  105, 1183, 1177,  106, 1344, 4196, 4190, 1343
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*Nset, nset="Fibre cell"
    1,    2,   11,   12,   13,   14
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*Elset, elset="Fibre cell", generate
    1,  4672,     1
*Nset, nset="Matrix cell"
    1,    2,    3,    4,    5,    6
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*Elset, elset="Matrix cell", generate
 4673,  7168,     1
*Nset, nset=TopS, generate
 1781,  2005,     1
*Nset, nset=BotS, generate
 1556,  1780,     1
*Nset, nset=LeftS, generate
 2006,  2230,     1
*Nset, nset=RightS, generate
 1331,  1555,     1
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*Distribution, name=Ori-1-DiscOrient, location=ELEMENT, Table=Ori-1-DiscOrient_Table
** Description: Distribution generated from Discrete Orientation
,           1.,           0.,           0.,           0.,           1.,           0.
1,           0.,           0.,           1.,           1.,           0.,           0.
2,           0.,           0.,           1.,           1.,           0.,           0.
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4672,           0.,           0.,           1.,           1.,           0.,           0.
*Orientation, name=Ori-1, system=RECTANGULAR
Ori-1-DiscOrient
3, 0.
** Section: Fibre section
*Solid Section, elset="Fibre cell", orientation=Ori-1, material=Fibre
,
** Section: Matrix section
*Solid Section, elset="Matrix cell", material=Matrix
,
*End Part
**
**
** ASSEMBLY
**
*Assembly, name=Assembly
**
*Instance, name=Union_part-1, part=Union_part
*End Instance
**
*Node
      1,           0.,           0.,           0.
*Node
      2,           0., -0.00400000019, 0.00400000019
*Node
      3, -0.00400000019,           0., 0.00400000019
*Node
      4,           0.,           0., 0.00800000038
*Node
      5,           0., 0.00400000019, 0.00400000019
*Node
      6, 0.00400000019,           0., 0.00400000019
*Nset, nset=Node1, instance=Union_part-1
 1,
*Nset, nset=Node2, instance=Union_part-1
 2,
*Nset, nset=Node3, instance=Union_part-1
 3,
*Nset, nset=Node4, instance=Union_part-1
 4,
*Nset, nset=Node5, instance=Union_part-1
 5,
*Nset, nset=Node6, instance=Union_part-1
 6,
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*End Assembly
*Distribution Table, name=Ori-1-DiscOrient_Table
coord3D, coord3D
**
** MATERIALS
**
*Material, name=Fibre
*Elastic
379300., 0.1
*Material, name=Matrix
*Elastic
68300., 0.3
** ----------------------------------------------------------------
**
** STEP: Step-1
**
*Step, name=Step-1, nlgeom=YES, inc=1000
*Static, stabilize=0.0002, allsdtol=0.05, continue=NO
0.1, 1., 1e-05, 0.1
**
** OUTPUT REQUESTS
**
*Restart, write, frequency=0
**
** FIELD OUTPUT: F-Output-1
**
*Output, field
*Node Output
CF, RF, U
*Element Output, directions=YES
ENER, IVOL, LE, PE, PEEQ, PEMAG, S
*Contact Output
CDISP, CSTRESS
**
** HISTORY OUTPUT: H-Output-1
**
*Output, history, variable=PRESELECT
*End Step
